<Node name="root" gravity=" 0 0 0" dt="0.0001">
    <VisualStyle displayFlags="showBehavior" />
	<EulerImplicitSolver name="Implicit Euler Solver" />
    <CGLinearSolver name="CG Solver" />
    <Node name="FirstObject" gravity=" 0 0 0">
        <MechanicalObject template="Vec3d" name="Particles" restScale="1" position="0 0 0 10 0 0 -10 0 0" velocity= "0 0 0 0 0 0"/>
        <UniformMass template="Vec3d" name="Mass" />
        <FixedConstraint template="Vec3d" name="Fix Particles" indices="0" />
        <StiffSpringForceField template="Vec3d" name="Internal Spring" spring="0 1 10 0 5" />
    </Node>
</Node>
